// COMSOL Multiphysics 5.5.0.359 model "imsi2.mph"
// Outline of the model tree

Geometry
  geom1 "Geometry 1" (3D, length unit m)
    imp1: Import
      type = native
      filename = /home/sbkim/Work/git/openfoam_seo/sbD_H_damper_mass_L.mphbin
      meshfilename = /home/sbkim/Work/git/openfoam_seo/sbD_H_damper_mass_L.mphbin
    fin: Finalize "Form Union"

Materials
  mat1: Common "Structural steel" on all domains
    def "Basic"
      relpermeability = 1
      heatcapacity = 475[J/(kg*K)]
      thermalconductivity = 44.5[W/(m*K)]
      electricconductivity = 4.032e6[S/m]
      relpermittivity = 1
      thermalexpansioncoefficient = 12.3e-6[1/K]
      density = 7850[kg/m^3]
    Enu "Young's modulus and Poisson's ratio"
      youngsmodulus = 200e9[Pa]
      poissonsratio = 0.30
    Murnaghan
      l = -3.0e11[Pa]
      m = -6.2e11[Pa]
      n = -7.2e11[Pa]
    Lame "Lamé parameters"
      lambLame = 1.15e11[Pa]
      muLame = 7.69e10[Pa]

Physics
  solid: SolidMechanics on all domains
    dependent variable u = {u, v, w}
    lemm1: LinearElasticModel "Linear Elastic Material 1" (default)
    free1: Free (default)
    init1: init "Initial Values 1" (default)
    fix1: Fixed "Fixed Constraint 1" on boundaries 1, 2, 5
    gr1: Gravity on domains 1

Mesh
  mesh1 "Mesh 1" (physics-controlled)
    size: MeshSizeDefault | hauto = 9

Studies
  std1 "Study 1"
    time: Transient "Time Dependent" | tlist = range(0,0.1,.1)

Solver configurations
  sol1 "Solution 1" (study std1)
    v1: Variables "Dependent Variables 1"
      comp1_u: Field "Displacement field (comp1.u)" | scalemethod = manual; scaleval = 1e-2*0.304905676078
    t1: Time "Time-Dependent Solver 1" | tlist = range(0,0.1,.1); timemethod = genalpha
      fc1: FullyCoupled | linsolver = d1
      d1: Direct "Suggested Direct Solver (solid)"

Datasets
  dset1: Solution | solution = sol1

Plots
  pg1: PlotGroup3D "Stress (solid)" | data = dset1
    surf1: Surface | expr = solid.mises
      def: Deform "Deformation" | expr = {u, v, w}
  pg2: PlotGroup3D "Volume Loads (solid)" | data = dset1; typeintitle = off; descriptionintitle = off; unitintitle = off
    arwv1: ArrowVolume "Gravity 1" | expr = {solid.gr1.F_Vx, solid.gr1.F_Vy, solid.gr1.F_Vz}; descr = Load (spatial frame)
      col: Color "Color Expression" | expr = comp1.solid.gr1.F_V_Mag
      def: Deform "Deformation" | expr = {u, v, w}
    surf1: Surface "Gray Surfaces" (disabled) | expr = 1
      def: Deform "Deformation" | expr = {u, v, w}