// COMSOL Multiphysics 5.5.0.359 model "cavity_01.mph"
// Outline of the model tree

Selections
  box1: Box | entitydim = 1; xmin = -0.02; xmax = 0.02; condition = inside
  box2: Box | entitydim = 1; xmin = 0.08; xmax = 0.12; condition = inside
  box3: Box | entitydim = 1; xmin = -inf; xmax = inf; ymin = -0.01; ymax = 0.01; condition = inside
  box4: Box | entitydim = 1; xmin = -inf; xmax = inf; ymin = 0.09; ymax = 0.11; condition = inside
  box5: Box | entitydim = 1; xmin = -inf; xmax = inf; ymin = 0.04; ymax = 0.06; condition = inside
  box6: Box | entitydim = 1; xmin = 0.04; xmax = 0.06; condition = inside

Geometry
  geom1 "Geometry 1" (2D, length unit m)
    sq1: Square | size = .1
    sq2: Square | size = 0.1/2
    co1: Compose | input = sq1, sq2; formula = sq1-sq2
    fin: Finalize "Form Union"

Materials
  mat1: Common "Material 1" on all domains
    def "Basic"
      density = 1
      dynamicviscosity = 1

Physics
  spf: TurbulentFlowSST on all domains
    dependent variable u = {u, v, w}
    fp1: FluidProperties (default)
    init1: init "Initial Values 1" (default)
    wallbc1: WallBC "Wall 1" (default)

Mesh
  mesh1 "Mesh 1" (physics-controlled)
    size: MeshSizeDefault | table = cfd; hauto = 8

Studies
  std1 "Study 1"
    wdi: WallDistanceInitialization
    time: Transient "Time Dependent" | tlist = range(0,0.1,1); initialtime = 0

Solver configurations
  sol1 "Solution 1" (study std1)
    v1: Variables "Dependent Variables 1"
    s1: Stationary "Stationary Solver 1" | stol = 1.0E-6
      fc1: FullyCoupled | linsolver = d1; initstep = 0.01; minstep = 1.0E-6; maxiter = 50
      d1: Direct "Direct, wall distance (spf)" | linsolver = pardiso; pivotperturb = 1.0E-13
    su1: StoreSolution "Solution Store 1"
    v2: Variables "Dependent Variables 2" | initmethod = sol; notsolmethod = sol
    t1: Time "Time-Dependent Solver 1"
      tlist = range(0,0.1,1)
      rtol = 0.005
      atolglobalfactor = 0.05
      atolmethod = {comp1_G, global, comp1_k, unscaled, comp1_om, unscaled, comp1_p, scaled, comp1_u, global}
      atolvaluemethod = {comp1_G, factor, comp1_k, manual, comp1_om, manual, comp1_p, factor, comp1_u, factor}
      atolfactor = {comp1_G, 0.1, comp1_k, 0.1, comp1_om, 0.1, comp1_p, 1, comp1_u, 0.1}
      atol = {comp1_G, 1e-3, comp1_k, (0.01*1)^2, comp1_om, (0.01*1)/(0.035*0.1), comp1_p, 1e-3, comp1_u, 1e-3}
      maxorder = 2
      stabcntrl = on
      bwinitstepfrac = 0.01
      estrat = exclude
      rhoinf = 0.5
      predictor = constant
      se1: Segregated
        maxsegiter = 10
        ntolfact = 0.5
        ratelimit = 10
        segstabacc = segaacc
        segaaccdim = 5
        segaaccmix = 0.9
        segaaccdelay = 1
        ss1: SegregatedStep "Velocity u, Pressure p"
          segvar = {comp1_u, comp1_p}
          linsolver = d1
          subdamp = 0.8
          subjtech = once
        ss2: SegregatedStep "Turbulence variables"
          segvar = {comp1_k, comp1_om}
          linsolver = d2
          subdamp = 0.8
          subjtech = onevery
          subntolfact = 0.1
        ll1: LowerLimit | lowerlimit = comp1.k 0 comp1.om 0
      d1: Direct "Direct, fluid flow variables (spf)" | linsolver = pardiso; pivotperturb = 1.0E-13
      d2: Direct "Direct, turbulence variables (spf)" | linsolver = pardiso; pivotperturb = 1.0E-13
  sol2 "Solution Store 1" (study std1)

Datasets
  dset1: Solution | solution = sol1
  dset2: Solution | solution = sol2

Plots
  pg1: PlotGroup2D "2D Plot Group 1" | data = dset1
    surf1: Surface | expr = spf.U