// COMSOL Multiphysics 5.5.0.359 model "cavity_02.mph"
// Outline of the model tree

Selections
  sel1: Explicit on boundaries 1
  sel2: Explicit on boundaries 8
  sel3: Explicit on boundaries 2
  sel4: Explicit on boundaries 3
  sel5: Explicit on boundaries 4
  sel6: Explicit on boundaries 7
  sel7: Explicit on boundaries 5
  sel8: Explicit on boundaries 6

Geometry
  geom1 "Geometry 1" (2D, length unit m)
    sq1: Square | size = .1
    sq2: Square | pos = {.1/4, .1/4}; size = .1/2
    dif1: Difference | input = sq1; input2 = sq2
    fin: Finalize "Form Union"

Materials
  mat1: Common "Material 1" on all domains
    def "Basic"
      density = 1
      dynamicviscosity = .01

Physics
  spf: LaminarFlow on all domains
    dependent variable u = {u, v, w}
    fp1: FluidProperties (default)
    init1: init "Initial Values 1" (default)
    wallbc1: WallBC "Wall 1" (default)
    wallbc2: WallBC "Wall 2" on boundaries 3 | uvw = 1; SlidingWall = 1
    prpc1: PressurePointConstraint on points 1

Mesh
  mesh1 "Mesh 1" (physics-controlled)
    size: MeshSizeDefault | table = cfd; hauto = 9

Studies
  std1 "Study 1"
    stat: Stationary

Solver configurations
  sol1 "Solution 1" (study std1)
    v1: Variables "Dependent Variables 1"
    s1: Stationary "Stationary Solver 1"
      fc1: FullyCoupled | linsolver = d1; initstep = 0.01; maxiter = 100
      d1: Direct "Direct, fluid flow variables (spf)" | linsolver = pardiso; pivotperturb = 1.0E-13

Datasets
  dset1: Solution | solution = sol1

Plots
  pg1: PlotGroup2D "Velocity (spf)" | data = dset1
    surf1: Surface | expr = spf.U; wireframe = on
  pg2: PlotGroup2D "Pressure (spf)" | data = dset1
    con1: Contour | expr = p; levelrounding = off