// COMSOL Multiphysics 5.5.0.359 model "deck_imsi.mph"
// Outline of the model tree

Parameters
  seo_U_in = 0.007834[m/s]
  seo_B = 0.279700[m]
  seo_D = 0.045000[m]

Selections
  box1: Box | entitydim = 1; xmin = -0.8; xmax = -0.7; ymin = -1; ymax = 1; condition = inside
  box2: Box | entitydim = 1; xmin = 1.7; xmax = 1.8; ymin = -1; ymax = 1; condition = inside
  box3: Box | entitydim = 1; xmin = -1.6; xmax = 3.1; ymin = -0.8; ymax = -0.7; condition = inside
  box4: Box | entitydim = 1; xmin = -1.6; xmax = 3.1; ymin = 0.7; ymax = 0.8; condition = inside
  box5: Box | entitydim = 1; xmin = -0.15; xmax = 0.15; ymin = -0.1; ymax = 0.12
  box6: Box | entitydim = 1; xmin = -0.15; xmax = 0; ymin = -0.1; ymax = 0.12
  box7: Box | entitydim = 1; xmin = 0; xmax = 0.15; ymin = -0.1; ymax = 0.12

Geometry
  geom1 "Geometry 1" (2D, length unit m)
    imp1: Import | type = dxf; filename = dxf/deck_cfd.dxf; knit = off; repairgeom = off
    csol1: ConvertToSolid | input = imp1
    sca1: Scale | input = csol1; isotropic = 1e-3; factor = 1e-3
    mov1: Move | input = sca1; displx = -164.707064; disply = -17.860000
    sca2: Scale | input = mov1; isotropic = 1/100; factor = 1/100
    rot2: Rotate | input = sca2
    r1: Rectangle | pos = {-1.5/2, -1.5/2}; size = {2.5, 1.5}
    c1: Circle | pos = {0, .02*0}; r = 0.2
    r2: Rectangle | pos = {-0.5, -0.5}; size = {2, 1}
    r3: Rectangle | pos = {-.75/2, -.75/2}; size = {1, 0.75}
    co1: Compose | input = r1, c1, r2, r3, rot2; formula = (r1+c1+r2+r3)-(rot2)
    fin: Finalize "Form Union"

Materials
  mat1: Common "Air" on all domains
    def "Basic"
      thermalexpansioncoefficient = alpha_p(pA,T)
      molarmass = 0.02897[kg/mol]
      bulkviscosity = muB(T)
      relpermeability = 1
      relpermittivity = 1
      dynamicviscosity = eta(T)
      ratioofspecificheat = 1.4
      electricconductivity = 0[S/m]
      heatcapacity = Cp(T)
      density = rho(pA,T)
      thermalconductivity = k(T)
      soundspeed = cs(T)
      eta: Piecewise | arg = T; pieces = {200.0, 1600.0, -8.38278E-7+8.35717342E-8*T^1-7.69429583E-11*T^2+4.6437266E-14*T^3-1.06585607E-17*T^4}; argunit = K; fununit = Pa*s
      Cp: Piecewise | arg = T; pieces = {200.0, 1600.0, 1047.63657-0.372589265*T^1+9.45304214E-4*T^2-6.02409443E-7*T^3+1.2858961E-10*T^4}; argunit = K; fununit = J/(kg*K)
      rho: Analytic | expr = pA*0.02897/R_const[K*mol/J]/T; args = {pA, T}; dermethod = manual; argders = {{pA, d(pA*0.02897/R_const/T,pA)}, {T, d(pA*0.02897/R_const/T,T)}}; argunit = Pa,K; fununit = kg/m^3
      k: Piecewise | arg = T; pieces = {200.0, 1600.0, -0.00227583562+1.15480022E-4*T^1-7.90252856E-8*T^2+4.11702505E-11*T^3-7.43864331E-15*T^4}; argunit = K; fununit = W/(m*K)
      cs: Analytic | expr = sqrt(1.4*R_const[K*mol/J]/0.02897*T); args = T; dermethod = manual; argunit = K; fununit = m/s
      an1: Analytic | funcname = alpha_p; expr = -1/rho(pA,T)*d(rho(pA,T),T); args = {pA, T}; argunit = Pa,K; fununit = 1/K
      an2: Analytic "Analytic 2a" | funcname = muB; expr = 0.6*eta(T); args = T; argunit = K; fununit = Pa*s
    RefractiveIndex
      n = 1
      ki = 0
    NonlinearModel
      BA = (def.gamma+1)/2

Physics
  spf: TurbulentFlowkeps "Turbulent Flow, k-ε" on all domains
    dependent variable u = {u, v, w}
    fp1: FluidProperties (default)
    init1: init "Initial Values 1" (default)
    wallbc1: WallBC "Wall 1" (default)
    inl1: InletBoundary "Inlet 1" on selection box1 | U0in = seo_U_in
    out1: OutletBoundary "Outlet 1" on selection box2
    sym1: Symmetry on selection box3
    sym2: Symmetry on selection box4

Mesh
  mesh1 "Mesh 1"
    size: MeshSizeDefault | hmax = 0.168; hmin = 7.5E-4; hcurve = 0.3; hgrad = 1.3
    bl1: BndLayer "Boundary Layers 1" on domains 4
      blp: BndLayerProp "Boundary Layer Properties" on selection box5
    fq2: FreeQuad on domains 3
      size1: Size on domains 3 | table = cfd
    fq3: FreeQuad on domains 2
      size1: Size on domains 2 | table = cfd
    fq1: FreeQuad on domains 1
      size1: Size on domains 1 | table = cfd

Studies
  std1 "Study 1"
    time: Transient "Time Dependent" | tlist = range(0,0.1,1)