// COMSOL Multiphysics 5.5.0.359 model "rib_upper_laminar_Re150.mph"
// Outline of the model tree

Selections
  box1: Box | entitydim = 1; xmin = -0.15; xmax = 0.15; ymin = -0.1; ymax = 0.12
  box2: Box | entitydim = 1; xmin = -0.15; xmax = 0; ymin = -0.1; ymax = 0.12
  box3: Box | entitydim = 1; xmin = 0; xmax = 0.15; ymin = -0.1; ymax = 0.12

Geometry
  geom1 "Geometry 1" (2D, length unit m)
    imp1: Import
      type = dxf
      filename = /media/sbkim/2266B8F966B8CEB3/git/openfoam_seo/wtt/yjn2/yjn2_cfd_rib_200915.dxf
      knit = curve
    csol1: ConvertToSolid | input = imp1
    del1: Delete "Delete Entities 1" | input = csol1(1) domains 1-5, 16-20
    sca1: Scale | input = del1; isotropic = 1e-3; factor = 1e-3
    mov1: Move | input = sca1; displx = -157.1274098; disply = -10.38496539
    sca2: Scale | input = mov1; isotropic = 1/6.250000e+01; factor = 1/6.250000e+01
    mir1: Mirror | input = sca2; axis = {1, 0}
    r1: Rectangle | pos = {-1.5, -1.5/2}; size = {4.5, 1.5}
    c1: Circle | pos = {0, .02}; r = 0.2
    r2: Rectangle | pos = {-0.5, -0.5}; size = {2, 1}
    r3: Rectangle | pos = {-.75/2, -.75/2}; size = {1, 0.75}
    co1: Compose | input = r1, c1, r2, r3, mir1; formula = (r1+c1+r2+r3)-(mir1)
    fin: Finalize "Form Union"

Materials
  mat1: Common "Air" on all domains
    def "Basic"
      thermalexpansioncoefficient = alpha_p(pA,T)
      molarmass = 0.02897[kg/mol]
      bulkviscosity = muB(T)
      relpermeability = 1
      relpermittivity = 1
      dynamicviscosity = eta(T)
      ratioofspecificheat = 1.4
      electricconductivity = 0[S/m]
      heatcapacity = Cp(T)
      density = rho(pA,T)
      thermalconductivity = k(T)
      soundspeed = cs(T)
      eta: Piecewise | arg = T; pieces = {200.0, 1600.0, -8.38278E-7+8.35717342E-8*T^1-7.69429583E-11*T^2+4.6437266E-14*T^3-1.06585607E-17*T^4}; argunit = K; fununit = Pa*s
      Cp: Piecewise | arg = T; pieces = {200.0, 1600.0, 1047.63657-0.372589265*T^1+9.45304214E-4*T^2-6.02409443E-7*T^3+1.2858961E-10*T^4}; argunit = K; fununit = J/(kg*K)
      rho: Analytic | expr = pA*0.02897/R_const[K*mol/J]/T; args = {pA, T}; dermethod = manual; argders = {{pA, d(pA*0.02897/R_const/T,pA)}, {T, d(pA*0.02897/R_const/T,T)}}; argunit = Pa,K; fununit = kg/m^3
      k: Piecewise | arg = T; pieces = {200.0, 1600.0, -0.00227583562+1.15480022E-4*T^1-7.90252856E-8*T^2+4.11702505E-11*T^3-7.43864331E-15*T^4}; argunit = K; fununit = W/(m*K)
      cs: Analytic | expr = sqrt(1.4*R_const[K*mol/J]/0.02897*T); args = T; dermethod = manual; argunit = K; fununit = m/s
      an1: Analytic | funcname = alpha_p; expr = -1/rho(pA,T)*d(rho(pA,T),T); args = {pA, T}; argunit = Pa,K; fununit = 1/K
      an2: Analytic "Analytic 2a" | funcname = muB; expr = 0.6*eta(T); args = T; argunit = K; fununit = Pa*s
    RefractiveIndex
      n = 1
      ki = 0
    NonlinearModel
      BA = (def.gamma+1)/2

Physics
  spf: LaminarFlow on all domains
    dependent variable u = {u, v, w}
    fp1: FluidProperties (default)
    init1: init "Initial Values 1" (default)
    wallbc1: WallBC "Wall 1" (default)
    inl1: InletBoundary "Inlet 1" on boundaries 1 | U0in = 0.0547799668338
    out1: OutletBoundary "Outlet 1" on boundaries 36
    sym1: Symmetry on boundaries 2, 3

Mesh
  mesh1 "Mesh 1"
    size: MeshSizeDefault | table = cfd; hauto = 4
    bl1: BndLayer "Boundary Layers 1" on domains 4
      blp: BndLayerProp "Boundary Layer Properties" on selection box1
    fq2: FreeQuad on domains 3
      size1: Size on domains 3 | table = cfd; hauto = 9
    fq3: FreeQuad on domains 2
      size1: Size on domains 2 | table = cfd; hauto = 9
    fq1: FreeQuad on domains 1
      size1: Size on domains 1 | table = cfd; hauto = 9

Studies
  std1 "Study 1"
    stat: Stationary

Solver configurations
  sol1 "Solution 1" (study std1)
    v1: Variables "Dependent Variables 1"
    s1: Stationary "Stationary Solver 1"
      fc1: FullyCoupled | linsolver = d1; initstep = 0.01; maxiter = 100
      d1: Direct "Direct, fluid flow variables (spf)" | linsolver = pardiso; pivotperturb = 1.0E-13

Datasets
  dset1: Solution | solution = sol1